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/batch
! ANSYS input file written by Workbench version 2020 R1
! File used for geometry attach: D:\SPSProjects\ANSYS_projects\modalMonocoque_files\dp0\ACP-Pre\DM\ACP-Pre.agdb
/title,modalMonocoque--Static Structural (B5)
/com,--- Data in consistent MKS units. See Solving Units in the help system for more information.
/units,MKS
/prep7
! Turn off shape checking because checks already performed inside WB mesher.
! See help system for more information.
SHPP,OFF,,NOWARN
etcon,set             ! allow ANSYS to choose best KEYOP's for 180x elements
/com,*********** Nodes for the whole assembly ***********
nblock,3,,6019
(1i9,3e20.9e3)
        1    -4.826000000E-01    -1.778000000E-01    -3.048000000E-01
        2    -2.286000000E-01    -1.778000000E-01    -3.048000000E-01
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-1
/com,*********** Nodes for all Remote Points ***********
nblock,3
(1i9,3e20.9e3)
     5473    -2.286000000E-01    -1.778000000E-01    -3.048000000E-01
     5474    -2.286000000E-01    -1.778000000E-01    -3.048000000E-01
     5475     0.000000000E+00     0.000000000E+00     0.000000000E+00
     5476     2.286000000E-01    -1.778000000E-01    -3.048000000E-01
     5477     2.286000000E-01    -1.778000000E-01    -3.048000000E-01
     5478     0.000000000E+00     0.000000000E+00     0.000000000E+00
-1
/com,*********** Elements for Body 1 "Line Body" ***********
et,1,188
keyo,1,3,2
eblock,19,solid,,4
(19i9)
        1        1        1        1        0        0        0        0        3        0        1        1        3        6
        1        1        1        1        0        0        0        0        3        0        2        3        4        7
        1        1        1        1        0        0        0        0        3        0        3        4        5        8
        1        1        1        1        0        0        0        0        3        0        4        5        2        9
-1
/com,*********** Elements for Body 2 "Line Body" ***********
et,2,188
keyo,2,3,2
eblock,19,solid,,4
(19i9)
        2        2        2        2        0        0        0        0        3        0        5       10       12       15
        2        2        2        2        0        0        0        0        3        0        6       12       13       16
        2        2        2        2        0        0        0        0        3        0        7       13       14       17
        2        2        2        2        0        0        0        0        3        0        8       14       11       18
-1
/com,*********** Elements for Body 3 "Surface Body" ***********
et,3,181
keyo,3,3,2
eblock,19,solid,,1296
(19i9)
        3        3        3        3        0        0        0        0        4        0     4098     3767     4200     4350     4343
        3        3        3        3        0        0        0        0        4        0     4099     4200     4199     4351     4350
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-1
/com,*********** Elements for Body 4 "Surface Body" ***********
et,4,181
keyo,4,3,2
eblock,19,solid,,720
(19i9)
        4        4        4        4        0        0        0        0        4        0     3378     3131     3471     3517     3510
        4        4        4        4        0        0        0        0        4        0     3379     3471     3470     3518     3517
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-1
/com,*********** Elements for Body 5 "Surface Body" ***********
et,5,181
keyo,5,3,2
eblock,19,solid,,2667
(19i9)
        5        5        5        5        0        0        0        0        4        0      711      984      865      656      656
        5        5        5        5        0        0        0        0        4        0      712     1098      866      865      865
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-1
/com,*********** Elements for Body 6 "Surface Body" ***********
et,6,181
keyo,6,3,2
eblock,19,solid,,702
(19i9)
        6        6        6        6        0        0        0        0        4        0        9     5312     5199      236      229
        6        6        6        6        0        0        0        0        4        0       10     5199     5198      237      236
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-1
/com,*********** Send User Defined Coordinate System(s) ***********
local,12,0,-0.2286,-0.177800000000254,-0.304800000000254,0.,0.,0.
local,13,0,0.228600000000254,-0.177800000000254,-0.304800000000254,0.,0.,0.
local,14,0,-0.2286,-0.177800000000254,-0.304800000000254,0.,0.,0.
local,15,0,0.228600000000254,-0.177800000000254,-0.304800000000254,0.,0.,0.
local,16,1,1.27009514017118e-013,-0.177800000000254,-0.304800000000254,0.,0.,0.
csys,0
toffst,273.15,  ! Temperature offset from absolute zero
/com,*********** Set Reference Temperature ***********
tref,22.
/com,*********** Send Materials ***********
Temperature = 'TEMP' ! Temperature
MP,DENS,1,7850,	! kg m^-3
MP,ALPX,1,1.2e-05,	! C^-1
MP,C,1,434,	! J kg^-1 C^-1
MP,KXX,1,60.5,	! W m^-1 C^-1
MP,RSVX,1,1.7e-07,	! kg m^3 A^-2 s^-3
MP,EX,1,200000000000,	! Pa
MP,NUXY,1,0.3,
MP,MURX,1,10000,

Temperature = 'TEMP' ! Temperature
MP,DENS,2,7850,	! kg m^-3
MP,ALPX,2,1.2e-05,	! C^-1
MP,C,2,434,	! J kg^-1 C^-1
MP,KXX,2,60.5,	! W m^-1 C^-1
MP,RSVX,2,1.7e-07,	! kg m^3 A^-2 s^-3
MP,EX,2,200000000000,	! Pa
MP,NUXY,2,0.3,
MP,MURX,2,10000,

Temperature = 'TEMP' ! Temperature
MP,DENS,3,7850,	! kg m^-3
MP,ALPX,3,1.2e-05,	! C^-1
MP,C,3,434,	! J kg^-1 C^-1
MP,KXX,3,60.5,	! W m^-1 C^-1
MP,RSVX,3,1.7e-07,	! kg m^3 A^-2 s^-3
MP,EX,3,200000000000,	! Pa
MP,NUXY,3,0.3,
MP,MURX,3,10000,

Temperature = 'TEMP' ! Temperature
MP,DENS,4,7850,	! kg m^-3
MP,ALPX,4,1.2e-05,	! C^-1
MP,C,4,434,	! J kg^-1 C^-1
MP,KXX,4,60.5,	! W m^-1 C^-1
MP,RSVX,4,1.7e-07,	! kg m^3 A^-2 s^-3
MP,EX,4,200000000000,	! Pa
MP,NUXY,4,0.3,
MP,MURX,4,10000,

Temperature = 'TEMP' ! Temperature
MP,DENS,5,7850,	! kg m^-3
MP,ALPX,5,1.2e-05,	! C^-1
MP,C,5,434,	! J kg^-1 C^-1
MP,KXX,5,60.5,	! W m^-1 C^-1
MP,RSVX,5,1.7e-07,	! kg m^3 A^-2 s^-3
MP,EX,5,200000000000,	! Pa
MP,NUXY,5,0.3,
MP,MURX,5,10000,

Temperature = 'TEMP' ! Temperature
MP,DENS,6,7850,	! kg m^-3
MP,ALPX,6,1.2e-05,	! C^-1
MP,C,6,434,	! J kg^-1 C^-1
MP,KXX,6,60.5,	! W m^-1 C^-1
MP,RSVX,6,1.7e-07,	! kg m^3 A^-2 s^-3
MP,EX,6,200000000000,	! Pa
MP,NUXY,6,0.3,
MP,MURX,6,10000,

/com,*********** Send Sheet Properties ***********
sectype,3,shell
secdata,2.54e-003
secoff,mid

sectype,4,shell
secdata,2.54e-003
secoff,mid

sectype,5,shell
secdata,2.54e-003
secoff,mid

sectype,6,shell
secdata,2.54e-003
secoff,mid

/com,*********** Send Beam Properties ***********
SECTYPE,1,BEAM,CTUB
SECDATA,1.016e-002,1.27e-002
secoffset,cent

SECTYPE,2,BEAM,CTUB
SECDATA,1.016e-002,1.27e-002
secoffset,cent

!************************* Model Summary ********************
!Line Body,	Structural Steel,	matid,	1
!Line Body,	Structural Steel,	matid,	2
!Surface Body,	Structural Steel,	matid,	3
!Surface Body,	Structural Steel,	matid,	4
!Surface Body,	Structural Steel,	matid,	5
!Surface Body,	Structural Steel,	matid,	6
!************************* End Model Summary ********************
/com,*********** Send Named Selection as Node Component ***********
CMBLOCK,FRONT   ,NODE,     1368
(8i10)
      3758      3759      3760      3761      3762      3763      3764      3765
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
/com,*********** Send Named Selection as Node Component ***********
CMBLOCK,BACK    ,NODE,     2701
(8i10)
       630       631       632       633       634       635       636       637
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/com,*********** Send Named Selection as Node Component ***********
CMBLOCK,LEFT    ,NODE,      772
(8i10)
        19        20        21        22        23        24        25        26
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/com,*********** Send Named Selection as Node Component ***********
CMBLOCK,RIGHT   ,NODE,      790
(8i10)
      3129      3130      3131      3132      3133      3134      3135      3136
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/com,*********** Fixed Supports ***********
CMBLOCK,_FIXEDSU,NODE,       72
(8i10)
      5094      5095      5150      5151      5152      5153      5154      5155
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
cmsel,s,_FIXEDSU
d,all,all
nsel,all
/com,*********** Define Vertex Force Using Follower Elements ***********
et,7,201
keyo,7,1,1           ! Keep the direction constant
keyo,7,2,1           ! Apply Forces only, not moment
mat,7
real,7
type,7
en,5400,1
r,7
rmod,7,1,1.0,              ! FX
mat,8
real,8
type,7
en,5401,1
r,8
rmod,8,2,1.0,              ! FY
mat,9
real,9
type,7
en,5402,1
r,9
rmod,9,3,1.0,              ! FZ
/com,*********** Define Vertex Force Using Follower Elements ***********
et,10,201
keyo,10,1,1           ! Keep the direction constant
keyo,10,2,1           ! Apply Forces only, not moment
mat,10
real,10
type,10
en,5403,11
r,10
rmod,10,1,1.0,              ! FX
mat,11
real,11
type,10
en,5404,11
r,11
rmod,11,2,1.0,              ! FY
mat,12
real,12
type,10
en,5405,11
r,12
rmod,12,3,1.0,              ! FZ
/com,*********** Create Remote Point "Remote Point" ***********
*set,tid,14
*set,cid,13
et,cid,174
et,tid,170
keyo,tid,2,1               ! Don't fix the pilot node
keyo,tid,4,111111
keyo,cid,12,5              ! Bonded Contact
keyo,cid,4,2               ! Rigid CERIG style load
keyo,cid,2,2               ! MPC style contact
eblock,10,,,19
(15i9)
     5406       13       13       13        0     4675     4674     4764     4763
     5407       13       13       13        0     4674     4378     4587     4764
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-1
*set,_npilot,5473
_npilot60=_npilot
type,tid
mat ,cid
real,cid
tshape,pilo
en,5425,_npilot
tshape
/com,*********** Create Remote Point "Internal Remote Point" ***********
! -------- Remote Point Used by "Fixed - Line Body To Surface Body" --------
*set,_npilot,5474
_npilot64=_npilot
et,15,170
type,15
real,15
mat,15
keyo,15,2,1              ! don't fix pilot node
keyo,15,4,111111
tshape,pilo
en,5426,5474        ! create pilot node for rigid link
tshape
en,5427,5474,2
/com,*********** Create Remote Point "Remote Point 2" ***********
*set,tid,17
*set,cid,16
et,cid,174
et,tid,170
keyo,tid,2,1               ! Don't fix the pilot node
keyo,tid,4,111111
keyo,cid,12,5              ! Bonded Contact
keyo,cid,4,2               ! Rigid CERIG style load
keyo,cid,2,2               ! MPC style contact
eblock,10,,,20
(15i9)
     5428       16       16       16        0     4822     4825     4799     4798
     5429       16       16       16        0     4825     4634     4371     4799
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-1
*set,_npilot,5476
_npilot70=_npilot
type,tid
mat ,cid
real,cid
tshape,pilo
en,5448,_npilot
tshape
/com,*********** Create Remote Point "Internal Remote Point 2" ***********
! -------- Remote Point Used by "Fixed - Line Body To Surface Body" --------
*set,_npilot,5477
_npilot73=_npilot
et,18,170
type,18
real,18
mat,18
keyo,18,2,1              ! don't fix pilot node
keyo,18,4,111111
tshape,pilo
en,5449,5477        ! create pilot node for rigid link
tshape
en,5450,5477,10
/com,*********** Create Joint "Fixed - Line Body To Surface Body" ***********
! Joint Element Type Declaration and Definition using MPC184
*set,_jid,19
et,_jid,184
keyo,_jid,1,13          ! Fixed Joint
sectype,_jid, joint, weld, _wbjoint
secjoint,,14,12
mat,_jid
real,_jid
type,_jid
secnum,_jid
en,5396,5474,5473      ! body to body joint
/com,*********** Create Joint "Fixed - Line Body To Surface Body" ***********
! Joint Element Type Declaration and Definition using MPC184
*set,_jid,20
et,_jid,184
keyo,_jid,1,13          ! Fixed Joint
sectype,_jid, joint, weld, _wbjoint
secjoint,,15,13
mat,_jid
real,_jid
type,_jid
secnum,_jid
en,5399,5477,5476      ! body to body joint
fini
/com,****************************************************************************
/com,*************************    SOLUTION       ********************************
/com,****************************************************************************
/solu
antype,0                   ! static analysis
_thickRatio=  0     ! Ratio of thick parts in the model
eqsl,sparse,,,,,1
cntr,print,1               ! print out contact info and also make no initial contact an error
dmpoption,emat,no             ! Don't combine emat file for DANSYS
dmpoption,esav,no             ! Don't combine esav file for DANSYS
nldiag,cont,iter           ! print out contact info each equilibrium iteration
rescontrol,,none                 ! Do not keep any restart files
/com,****************************************************
/com,******************* SOLVE FOR LS 1 OF 1 ****************
esel,s,real,,7
sfe,all,1,pres,1,0.
esel,s,real,,8
sfe,all,1,pres,1,-1000.
esel,s,real,,9
sfe,all,1,pres,1,0.
esel,s,real,,10
sfe,all,1,pres,1,0.
esel,s,real,,11
sfe,all,1,pres,1,1000.
esel,s,real,,12
sfe,all,1,pres,1,0.
esel,all
nsub,1,1,1
time,1.
outres,erase
outres,all,none
outres,nsol,all,
outres,rsol,all
outres,eangl,all
outres,etmp,all
outres,veng,all
outres,strs,all,
outres,epel,all,
outres,eppl,all,
outres,cont,all,
esel,s,type,,1
esel,a,type,,2
esel,a,type,,19,20
cm,_elmisc,elem
esel,all
outres,misc,all,_elmisc
! *********** WB SOLVE COMMAND ***********
! check interactive state
*get,ANSINTER_,active,,int
*if,ANSINTER_,ne,0,then
/eof
*endif
solve
/com *************** Write FE CONNECTORS *********
CEWRITE,file,ce,,INTE
/com,****************************************************
/com,*************** FINISHED SOLVE FOR LS 1 *************
/post1
fini
